/CWD,%PATH_A%%PATH_B%%PATH_C%%PATH_D%%PATH_E%%PATH_DATA%
PARSAV,SCALAR,SimParams,txt

ANTYPE,STATIC
*IF,incPStress,EQ,1,THEN
checkSolveQSPStress = 'on'
RESCONTROL,LINEAR,ALL,1 ! LINEAR STATIC ANALYSIS TO PRESTRESS MODEL	SOLVE
*ELSE
checkSolveQSPStress = 'off'
*ENDIF
OUTRES,ALL,ALL
SOLVE

/CWD,%PATH_A%%PATH_B%%PATH_C%%PATH_D%%PATH_E%%PATH_FUNC%
